# UNIVERSAL CONSTANTS
g := 9.8 m/s^2
# DISNEY BD-X (HY --> HR --> HP --> KP --> AP)
m_HY := 0.530 kg
D_HY := 96 mm
H_HY := 42 mm
τ_HY := 24 N*m
m_HR := 0.605 kg
D_HR := 93 mm
H_HR := 45 mm
τ_HR := 34 N*m
m_HP := 0.605 kg
D_HP := 93 mm
H_HP := 45 mm
τ_HP := 34 N*m
m_KP := 0.605 kg
D_KP := 93 mm
H_KP := 45 mm
τ_KP := 34 N*m
m_AP := 0.530 kg
D_AP := 96 mm
H_AP := 42 mm
τ_AP := 24 N*m
I_HY_1 := 8^-1*m_HY*D_HY^2 = 610.56 kg*mm^2
I_HY_2 := 16^-1*m_HY*D_HY^2 + 12^-1*m_HY*H_HY^2 = 383.19 kg*mm^2
1/2*m_HY*(D_HY/2)^2 = 610.56 kg*mm^2
I_HR_1 := 8^-1*m_HR*D_HR^2 = 654.081 kg*mm^2
I_HR_2 := 16^-1*m_HR*D_HR^2 + 12^-1*m_HR*H_HR^2 = 429.134 kg*mm^2
I_HP_1 := 8^-1*m_HP*D_HP^2 = 654.081 kg*mm^2
I_HP_2 := 16^-1*m_HP*D_HP^2 + 12^-1*m_HP*H_HP^2 = 429.134 kg*mm^2
I_KP_1 := 8^-1*m_KP*D_KP^2 = 654.081 kg*mm^2
I_KP_2 := 16^-1*m_KP*D_KP^2 + 12^-1*m_KP*H_KP^2 = 429.134 kg*mm^2
1/4*m_HY*(D_HY/2)^2 + 1/12*m_HY*H_HY^2 = 383.19 kg*mm^2
I_AP_1 := 8^-1*m_AP*D_AP^2 = 610.56 kg*mm^2
I_AP_2 := 16^-1*m_AP*D_AP^2 + 12^-1*m_AP*H_AP^2 = 383.19 kg*mm^2
L_HY_HR := 80 mm
L_HR_HP := 100 mm
L_HP_KP := 120 mm
L_KP_AP := 140 mm
I_HY_AP := I_HR_2 + ((I_HP_2 + I_KP_2 + I_AP_2) + (m_HP + m_KP + m_AP)*L_HR_HP^2) = 19070.6 kg*mm^2
I_HR_AP := (I_HP_2 + I_KP_2 + I_AP_2) + (m_HP + m_KP + m_AP)*L_HR_HP^2 = 18641.5 kg*mm^2
I_HP_AP := (I_KP_1 + m_KP*L_HP_KP^2) + (I_AP_1 + m_AP*(L_HP_KP + L_KP_AP)^2) = 45804.6 kg*mm^2
I_KP_AP := I_AP_1 + m_AP*L_KP_AP^2 = 10998.6 kg*mm^2
α_HY := τ_HY/I_HY_AP = 72105.7 °/s^2
α_HR := τ_HR/I_HR_AP = 104501 °/s^2
α_HP := τ_HP/I_HP_AP = 42529.7 °/s^2
α_KP := τ_KP/I_KP_AP = 177119 °/s^2
τ_HR_lift := m_KP*g*L_HP_KP + m_AP*g*(L_HP_KP + L_KP_AP) = 2.06192 N*m
τ_HP_lift := m_KP*g*L_HP_KP + m_AP*g*(L_HP_KP + L_KP_AP) = 2.06192 N*m
τ_KP_lift := m_AP*g*L_KP_AP = 0.72716 N*m
# SHI2-D2 (HR/HP --> HY --> KP --> AP/AR)
m_HR := 0.310 kg
D_HR := 57 mm
H_HR := 51 mm
τ_HR := 14 N*m
m_HP := 0.310 kg
D_HP := 57 mm
H_HP := 51 mm
τ_HP := 14 N*m
m_HY := 0.242 kg
D_HY := 46 mm
H_HY := 44 mm
τ_HY := 6 N*m
m_KP := 0.705 kg
D_KP := 96 mm
H_KP := 49 mm
τ_KP := 45 N*m
m_AP := 0.100 kg
D_AP := 43 mm
H_AP := 30 mm
τ_AP := 1.79 N*m
m_AR := 0.100 kg
D_AR := 43 mm
H_AR := 30 mm
τ_AR := 1.79 N*m
I_HR_1 := 8^-1*m_HR*D_HR^2 = 125.899 kg*mm^2
I_HR_2 := 16^-1*m_HR*D_HR^2 + 12^-1*m_HR*H_HR^2 = 130.142 kg*mm^2
1/2*(m_AP + m_AR)*(0.5*(D_AP + D_AR)/2)^2 = 46.225 kg*mm^2
I_HP_1 := 8^-1*m_HP*D_HP^2 = 125.899 kg*mm^2
I_HP_2 := 16^-1*m_HP*D_HP^2 + 12^-1*m_HP*H_HP^2 = 130.142 kg*mm^2
I_HY_1 := 8^-1*m_HY*D_HY^2 = 64.009 kg*mm^2
I_HY_2 := 16^-1*m_HY*D_HY^2 + 12^-1*m_HY*H_HY^2 = 71.0472 kg*mm^2
I_AP_1 + I_AP_1 = 1221.12 kg*mm^2
I_KP_1 := 8^-1*m_KP*D_KP^2 = 812.16 kg*mm^2
I_KP_2 := 16^-1*m_KP*D_KP^2 + 12^-1*m_KP*H_KP^2 = 547.139 kg*mm^2
I_AP_1 := 8^-1*m_AP*D_AP^2 = 23.1125 kg*mm^2
I_AP_2 := 16^-1*m_AP*D_AP^2 + 3^-1*m_AP*H_AP^2 = 41.5562 kg*mm^2
I_AR_1 := 8^-1*m_AR*D_AR^2 = 23.1125 kg*mm^2
I_AR_2 := 16^-1*m_AR*D_AR^2 + 3^-1*m_AR*H_AR^2 = 41.5562 kg*mm^2
1/4*(m_AP + m_AR)*(0.5*(D_AP + D_AR)/2)^2 + 1/12*(m_AP + m_AR)*(H_AP + H_AR)^2 = 83.1125 kg*mm^2
1/4*m_AP*(D_AP/2)^2 + 1/3*m_AP*H_AP^2 + 1/4*m_AR*(D_AR/2)^2 + 1/3*m_AR*H_AR^2 = 83.1125 kg*mm^2
L_HP_HR := 145 mm
L_HR_HY := 72.5 mm
I_AP_2 + I_AR_2 = 83.1125 kg*mm^2
L_HY_KP := 105 mm
L_KP_AP := 120 mm
L_AP_AR := 30 mm
I_HR_AP := I_HY_2 + ((I_KP_2 + I_AP_2 + I_AR_2) + (m_KP + m_AP + m_AR)*L_HY_KP^2) = 10678.9 kg*mm^2
I_HP_AP := I_HY_2 + I_KP_1 + ((I_AP_1 + I_AP_1) + (m_AP + m_AR)*L_KP_AP^2) = 3809.43 kg*mm^2
I_HY_AP := (I_KP_2 + I_AP_2 + I_AR_2) + (m_KP + m_AP + m_AR)*L_HY_KP^2 = 10607.9 kg*mm^2
14 N*m/(40 mm) = 350 N
I_KP_AP := I_AP_1 + I_AR_1 + (m_AP + m_AR)*L_KP_AP^2 = 2926.23 kg*mm^2
α_HR := (τ_HR + τ_HP)/I_HR_AP = 150229 °/s^2
α_HY := τ_HY/I_HY_AP = 32407.5 °/s^2
30°*L_HY_KP = 54.9779 mm
α_HP := (τ_HP + τ_HR)/I_HP_AP = 421134 °/s^2
α_KP := τ_KP/I_KP_AP = 881105 °/s^2
τ_HR_lift := (m_AP + m_AR)*g*L_KP_AP = 0.2352 N*m
τ_HP_lift := (m_AP + m_AR)*g*L_KP_AP = 0.2352 N*m
τ_KP_lift := (m_AP + m_AR)*g*L_KP_AP = 0.2352 N*m
# SHI2-D2 (HY --> HR/HP --> KP --> AP/AR)
m_HY := 0.310 kg
D_HY := 57 mm
H_HY := 51 mm
τ_HY := 14 N*m
m_HR := 0.310 kg
D_HR := 57 mm
H_HR := 51 mm
τ_HR := 14 N*m
m_HP := 0.310 kg
D_HP := 57 mm
H_HP := 51 mm
τ_HP := 14 N*m
m_KP := 0.705 kg
D_KP := 96 mm
H_KP := 49 mm
τ_KP := 45 N*m
m_AP := 0.100 kg
D_AP := 43 mm
H_AP := 30 mm
τ_AP := 1.79 N*m
m_AR := 0.100 kg
D_AR := 43 mm
H_AR := 30 mm
τ_AR := 1.79 N*m
I_HY_1 := 8^-1*m_HY*D_HY^2 = 125.899 kg*mm^2
I_HY_2 := 16^-1*m_HY*D_HY^2 + 12^-1*m_HY*H_HY^2 = 130.142 kg*mm^2
I_HR_1 := 8^-1*m_HR*D_HR^2 = 125.899 kg*mm^2
I_HR_2 := 16^-1*m_HR*D_HR^2 + 3^-1*m_HR*H_HR^2 = 331.719 kg*mm^2
I_HP_1 := 8^-1*m_HP*D_HP^2 = 125.899 kg*mm^2
I_HP_2 := 16^-1*m_HP*D_HP^2 + 3^-1*m_HP*H_HP^2 = 331.719 kg*mm^2
I_KP_1 := 8^-1*m_KP*D_KP^2 = 812.16 kg*mm^2
I_KP_2 := 16^-1*m_KP*D_KP^2 + 12^-1*m_KP*H_KP^2 = 547.139 kg*mm^2
I_AP_1 := 8^-1*m_AP*D_AP^2 = 23.1125 kg*mm^2
I_AP_2 := 16^-1*m_AP*D_AP^2 + 3^-1*m_AP*H_AP^2 = 41.5562 kg*mm^2
I_AR_1 := 8^-1*m_AR*D_AR^2 = 23.1125 kg*mm^2
I_AR_2 := 16^-1*m_AR*D_AR^2 + 3^-1*m_AR*H_AR^2 = 41.5562 kg*mm^2
L_HY_HR := 90 mm
L_HR_HP := 35 mm
L_HP_KP := 92 mm
L_KP_AP := 120 mm
L_AP_AR := 30 mm
I_HY_AP := (I_HR_2 + I_HP_2 + I_KP_2 + I_AP_2 + I_AR_2) + (m_KP + m_AP + m_AR)*L_HY_KP^2 = 11271.3 kg*mm^2
I_HR_AP := (I_KP_2 + I_AP_2 + I_AR_2) + (m_KP + m_AP + m_AR)*L_HY_KP^2 = 10607.9 kg*mm^2
I_HP_AP := I_KP_1 + ((I_AP_1 + I_AP_1) + (m_AP + m_AR)*L_KP_AP^2) = 3738.39 kg*mm^2
I_KP_AP := I_AP_1 + I_AR_1 + (m_AP + m_AR)*L_KP_AP^2 = 2926.23 kg*mm^2
I_KP_AP2 := I_AP_1 + I_AR_1 + m_AP*(75 mm)^2 + m_AR*(75 mm)^2 = 1171.22 kg*mm^2
α_HY := τ_HY/I_HY_AP = 71166.6 °/s^2
α_HR := (τ_HR + τ_HP)/I_HR_AP = 151235 °/s^2
τ_KP/I_KP_AP2 = 2201379 °/s^2
α_HP := (τ_HP + τ_HR)/I_HP_AP = 429138 °/s^2
α_KP := τ_KP/I_KP_AP = 881105 °/s^2
τ_HR_lift := (m_AP + m_AR)*g*L_KP_AP = 0.2352 N*m
τ_HP_lift := (m_AP + m_AR)*g*L_KP_AP = 0.2352 N*m
τ_KP_lift := (m_AP + m_AR)*g*L_KP_AP = 0.2352 N*m
